<?xml version="1.0" encoding="UTF-8"?>
<!--####################################################################
Vickers VC10 for Flightgear
Copyright (C) 2020 Alan Teeder

This program is free software: you can redistribute it and/or modify
it under the terms of the GNU General Public License as published by
the Free Software Foundation, either version 3 of the License, or
(at your option) any later version.

This program is distributed in the hope that it will be useful,
but WITHOUT ANY WARRANTY; without even the implied warranty of
MERCHANTABILITY or FITNESS FOR A PARTICULAR PURPOSE.  See the
GNU General Public License for more details.

You should have received a copy of the GNU General Public License
along with this program.  If not, see <http://www.gnu.org/licenses/>.

########################################################################-->
<?xml-stylesheet type="text/xsl" href="http://jsbsim.sourceforge.net/JSBSim.xsl"?>


<fdm_config name="VC10" version="2.0" release="ALPHA"
            xmlns:xsi="http://www.w3.org/2001/XMLSchema-instance"
            xsi:noNamespaceSchemaLocation="http://jsbsim.sourceforge.net/JSBSim.xsd">

	<fileheader>
		<author>Alan Teeder</author>
		<filecreationdate>2020-09-19</filecreationdate>
		<version>1.0.0</version>
		<description>Vickers VC10</description>
	</fileheader>

<!--
  File:     VC10.xml

  Inputs:
    name:          VC10
    type:          four-engine subsonic jet transport
    max weight:    333795.105 lb
    wing span:     140.167 ft
    length:        158.833 ft
    wing area:     2851.0 sq-ft
    gear type:     tricycle
    retractable?:  yes
    No of engines:     4
    engine type:   turbine
    engine layout: rear
  Outputs:
    payload:       40420.0 lbs
 -->


	<metrics>
		<wingarea unit="FT2">2851.0</wingarea>
		<wingspan unit="FT">140.167</wingspan>
		<wing_incidence unit="DEG">4.00</wing_incidence>
		<chord unit="FT">20.017</chord>
		<htailarea unit="FT2">638.00</htailarea>
		<htailarm unit="FT">68.82</htailarm>
		<vtailarea unit="FT2">476.00</vtailarea>
		<vtailarm unit="FT">68.82</vtailarm>

		<!--  	 The datum origin is 8" behind the front of the radome, and level with the main cabin floor. -->

		<location name="AERORP" unit="IN"><!--  DO NOT CHANGE !! All aerodynamics data
									has been transformed to use this reference datum point.
        79.07ft, 948.84" aft of the datum origin corresponds to 32% SMC		!! -->
			<x>948.84</x><!--79.07 ft -->
			<y>0.00</y>
			<z>0.00</z>
		</location>
		<location name="EYEPOINT" unit="IN">
			<x>74.8</x><!--1.9 m -->
			<y>0.00</y>
			<z>47.2</z><!--1.2 m -->
		</location>
		<location name="VRP" unit="IN">
			<x>0.00</x>
			<y>0.00</y>
			<z>0.00</z>
		</location>
	</metrics>

	<mass_balance>
		<!-- Note. These inertias are for the empty aircraft -->
		<!-- Structure weight	38088 kg, 83969.7lb  -->
		<!-- Bare weight		54786 kg, 120782lb  -->
		<!-- Basic weight		67315 kg, 148404.2lb - This is our "emptywt"  -->
		<!-- Trim datum 948.0" = 872"+76", where 872" is LE of SMC  -->
		<!-- Basic weight lever arm 30.4", aft of trim datum -->

		<ixx unit="SLUG*FT2">1131000</ixx>
		<iyy unit="SLUG*FT2">6092000</iyy>
		<izz unit="SLUG*FT2">6547000</izz>
		<emptywt unit="LBS">148404.2</emptywt><!-- Basic weight 67315 kg  -->
		<location name="CG" unit="IN">
			<x>978.4</x><!--  Basic weight CG position 948.0 + 30.4" -->
			<y>0.0</y>
			<z>-45.20</z>
		</location>
		<pointmass name="CREW">
			<weight unit="LBS">540</weight>
			<location name="POINTMASS" unit="IN">
				<x>100</x>
				<y>0</y>
				<z>0</z>
			</location>
		</pointmass>
		<pointmass name="Cabin_C1">
			<weight unit="LBS">0</weight><!-- Passengers/Cabin Crew + hand luggage -->
			<location name="CabinC1" unit="IN">
				<x>277.3</x>
				<y>0</y>
				<z>0</z>
			</location>
		</pointmass>
		<pointmass name="Cabin_C2">
			<weight unit="LBS">0</weight><!-- Passengers/Cabin Crew + hand luggage -->
			<location name="CabinC2" unit="IN">
				<x>409.1</x>
				<y>0</y>
				<z>0</z>
			</location>
		</pointmass>
		<pointmass name="Cabin_C3">
			<weight unit="LBS">0</weight><!-- Passengers/Cabin Crew + hand luggage -->
			<location name="CabinC3" unit="IN">
				<x>549.1</x>
				<y>0</y>
				<z>0</z>
			</location>
		</pointmass>
		<pointmass name="Cabin_C4">
			<weight unit="LBS">0</weight><!-- Passengers/Cabin Crew  + hand luggage -->
			<location name="CabinC4" unit="IN">
				<x>669.1</x>
				<y>0</y>
				<z>0</z>
			</location>
		</pointmass>
		<pointmass name="Cabin_C5">
			<weight unit="LBS">0</weight><!-- Passengers/Cabin Crew + hand luggage -->
			<location name="CabinC5" unit="IN">
				<x>779.1</x>
				<y>0</y>
				<z>0</z>
			</location>
		</pointmass>
		<pointmass name="Cabin_C6">
			<weight unit="LBS">0</weight><!-- Passengers/Cabin Crew  + hand luggage -->
			<location name="CabinC7" unit="IN">
				<x>949.1</x>
				<y>0</y>
				<z>0</z>
			</location>
		</pointmass>
		<pointmass name="Cabin_C7">
			<weight unit="LBS">0</weight><!-- Passengers/Cabin Crew + hand luggage -->
			<location name="CabinC7" unit="IN">
				<x>1131.1</x>
				<y>0</y>
				<z>0</z>
			</location>
		</pointmass>
		<pointmass name="Hold_H8">
			<weight unit="LBS">0</weight><!-- Cargo Hold -->
			<location name="HoldH8" unit="IN">
				<x>429.6</x>
				<y>0</y>
				<z>-20</z>
			</location>
		</pointmass>
		<pointmass name="Hold_H9">
			<weight unit="LBS">0</weight><!-- Cargo Hold -->
			<location name="HoldH9" unit="IN">
				<x>549.1</x>
				<y>0</y>
				<z>-20</z>
			</location>
		</pointmass>
		<pointmass name="Hold_H10">
			<weight unit="LBS">0</weight><!-- Cargo Hold -->
			<location name="HoldH10" unit="IN">
				<x>1131.1</x>
				<y>0</y>
				<z>-20</z>
			</location>
		</pointmass>
		<pointmass name="Hold_H11">
			<weight unit="LBS">0</weight><!-- Cargo Hold -->
			<location name="HoldH11" unit="IN">
				<x>1322.0</x>
				<y>0</y>
				<z>-20</z>
			</location>
		</pointmass>
	</mass_balance>

	<ground_reactions>
		<contact type="BOGEY" name="NOSE">
			<location unit="IN">
				<x>218.44</x>
				<y>0.00</y>
				<z>-123.00</z>
			</location>
			<static_friction>0.55</static_friction>
			<dynamic_friction>0.50</dynamic_friction>
			<rolling_friction>0.02</rolling_friction>
			<spring_coeff unit="LBS/FT">90000</spring_coeff>
			<damping_coeff unit="LBS/FT/SEC">6000</damping_coeff>
			<damping_coeff_rebound unit="LBS/FT/SEC">12000</damping_coeff_rebound>
			<relaxation_velocity>
				<rolling unit="FT/SEC">0.6</rolling>
				<side unit="FT/SEC">0.6</side>
			</relaxation_velocity>
			<force_lag_filter>
				<rolling>120.0</rolling>
				<side>120.0</side>
			</force_lag_filter>
			<wheel_slip_filter>120.0</wheel_slip_filter>
			<max_steer unit="DEG">60</max_steer>
			<brake_group>NONE</brake_group>
			<retractable>1</retractable>
		</contact>

		<contact type="BOGEY" name="LEFT_MAIN">
			<location unit="IN">
				<x>1008.0</x>
				<y>-128.5</y>
				<z>-138.6</z>
			</location>
			<static_friction>0.35</static_friction>
			<dynamic_friction>0.70</dynamic_friction>
			<rolling_friction>0.02</rolling_friction>
			<spring_coeff unit="LBS/FT">230000.00</spring_coeff>
			<damping_coeff unit="LBS/FT/SEC">140000.00</damping_coeff>
			<max_steer unit="DEG">0</max_steer>
			<brake_group>LEFT</brake_group>
			<retractable>1</retractable>
		</contact>

		<contact type="BOGEY" name="RIGHT_MAIN">
			<location unit="IN">
				<x>1008.0</x>
				<y>128.5</y>
				<z>-138.6</z>
			</location>
			<static_friction>0.35</static_friction>
			<dynamic_friction>0.70</dynamic_friction>
			<rolling_friction>0.02</rolling_friction>
			<spring_coeff unit="LBS/FT">230000.00</spring_coeff>
			<damping_coeff unit="LBS/FT/SEC">140000.00</damping_coeff>
			<max_steer unit="DEG">0</max_steer>
			<brake_group>RIGHT</brake_group>
			<retractable>1</retractable>
		</contact>

		<contact type="STRUCTURE" name="NOSE_CRASHED">
			<location unit="IN">
				<x>-8.0</x>
				<y>0.00</y>
				<z>-11.8</z>
			</location>
			<static_friction>0.55</static_friction>
			<dynamic_friction>0.50</dynamic_friction>
			<spring_coeff unit="LBS/FT">360600.00</spring_coeff>
			<damping_coeff unit="LBS/FT/SEC">80000.00</damping_coeff>
		</contact>

		<contact type="STRUCTURE" name="Rear Fuselage">
			<location unit="IN">
				<x>1604.0</x>
				<y>0.00</y>
				<z>26.4</z>
			</location>
			<static_friction>0.55</static_friction>
			<dynamic_friction>0.50</dynamic_friction>
			<spring_coeff unit="LBS/FT">360600.00</spring_coeff>
			<damping_coeff unit="LBS/FT/SEC">80000.00</damping_coeff>
		</contact>

		<contact type="STRUCTURE" name="LEFT_WING">
			<location unit="IN">
				<x>1352.8</x>
				<y>-877.0</y>
				<z>160.0</z>
			</location>
			<static_friction>0.55</static_friction>
			<dynamic_friction>0.50</dynamic_friction>
			<spring_coeff unit="LBS/FT">360600.00</spring_coeff>
			<damping_coeff unit="LBS/FT/SEC">80000.00</damping_coeff>
		</contact>

		<contact type="STRUCTURE" name="RIGHT_WING">
			<location unit="IN">
				<x>1352.8</x>
				<y>877.0</y>
				<z>160.0</z>
			</location>
			<static_friction>0.55</static_friction>
			<dynamic_friction>0.50</dynamic_friction>
			<spring_coeff unit="LBS/FT">360600.00</spring_coeff>
			<damping_coeff unit="LBS/FT/SEC">80000.00</damping_coeff>
		</contact>
	</ground_reactions>

	<propulsion>
		<engine file="RCo12">
			<feed>7</feed>
			<thruster file="direct">
				<location unit="IN">
					<x>1462.0</x>
					<y>-180.8</y>
					<z>15.0</z>
				</location>
				<orient unit="DEG">
					<pitch>3.0</pitch>>
					<roll>0.00</roll>
					<yaw>0.00</yaw>
				</orient>
			</thruster>
		</engine>

		<engine file="RCo12">
			<feed>8</feed>
			<thruster file="direct">
				<location unit="IN">
					<x>1462.0</x>
					<y>-112.22</y>
					<z>15.0</z>
				</location>
				<orient unit="DEG">
					<pitch>3.0</pitch>
					<roll>0.00</roll>
					<yaw>0.00</yaw>
				</orient>
			</thruster>
		</engine>

		<engine file="RCo12">
			<feed>9</feed>
			<thruster file="direct">
				<location unit="IN">
					<x>1462.0</x>
					<y>112.2</y>
					<z>15.0</z>
				</location>
				<orient unit="DEG">
					<pitch>3.0</pitch>>
					<roll>0.00</roll>
					<yaw>0.00</yaw>
				</orient>
			</thruster>
		</engine>

		<engine file="RCo12">
			<feed>10</feed>
			<thruster file="direct">
				<location unit="IN">
					<x>1462.0</x>
					<y>180.9</y>
					<z>15.0</z>
				</location>
				<orient unit="DEG">
					<pitch>3.0</pitch>>
					<roll>0.00</roll>
					<yaw>0.00</yaw>
				</orient>
			</thruster>
		</engine>


		<!-- Tank 1A -->
		<tank type="FUEL" number="0">
			<location unit="IN">
				<x>1068.0</x>
				<y>-669.7</y>
				<z>-7.09</z>
			</location>
			<capacity unit="LBS">11440.00</capacity>
			<contents unit="LBS">9000.00</contents>
		</tank>
		<!-- Tank 1  -->
		<tank type="FUEL" number="1">
			<location unit="IN">
				<x>958.0</x>
				<y>-370.08</y>
				<z>-18.90</z>
			</location>
			<capacity unit="LBS">15240.00</capacity>
			<contents unit="LBS">9000.00</contents>
		</tank>
		<!-- Tank 2  -->
		<tank type="FUEL" number="2">
			<location unit="IN">
				<x>858.0</x>
				<y>-165.35</y>
				<z>-29.53</z>
			</location>
			<capacity unit="LBS">27040.00</capacity>
			<contents unit="LBS">18000.00</contents>
		</tank>
		<!-- Tank 3  -->
		<tank type="FUEL" number="3">
			<location unit="IN">
				<x>858.0</x>
				<y>165.35</y>
				<z>-29.53</z>
			</location>
			<capacity unit="LBS">27040.00</capacity>
			<contents unit="LBS">18000.00</contents>
		</tank>
		<!-- Tank 4  -->
		<tank type="FUEL" number="4">
			<location unit="IN">
				<x>958.0</x>
				<y>370.08</y>
				<z>-18.90</z>
			</location>
			<capacity unit="LBS">15240.00</capacity>
			<contents unit="LBS">9000.00</contents>
		</tank>
		<!-- Tank 4A  -->
		<tank type="FUEL" number="5">
			<location unit="IN">
				<x>1068.0</x>
				<y>669.7</y>
				<z>-7.09</z>
			</location>
			<capacity unit="LBS">11440.00</capacity>
			<contents unit="LBS">9000.0</contents>
		</tank>
		<!-- Centre Tank -->
		<tank type="FUEL" number="6">
			<location unit="IN">
				<x>818.0</x>
				<y>0.0</y>
				<z>-29.53</z>
			</location>
			<capacity unit="LBS">36520.00</capacity>
			<contents unit="LBS">0.00</contents>
		</tank>

		<!-- Individual Low Pressure Cocks connect the Engine Fuel Supply Pipes to the related section of the Fuel Feed Galery.-->

		<!-- Engine 1 Fuel Supply Pipes-->
		<tank type="FUEL" number="7">
			<location unit="IN">
				<x>1462.0</x>
				<y>-180.8</y>
				<z>5.90</z>
			</location>
			<capacity unit="LBS">10.0</capacity>
			<contents unit="LBS">10.0</contents>
		</tank>

		<!-- Engine 2 Fuel Supply Pipes -->
		<tank type="FUEL" number="8">
			<location unit="IN">
				<x>1462.0</x>
				<y>-112.22</y>
				<z>5.90</z>
			</location>
			<capacity unit="LBS">10.0</capacity>
			<contents unit="LBS">10.0</contents>
		</tank>

		<!-- Engine 3 Fuel Supply Pipes -->
		<tank type="FUEL" number="9">
			<location unit="IN">
				<x>1462.0</x>
				<y>112.22</y>
				<z>5.90</z>
			</location>
			<capacity unit="LBS">10.0</capacity>
			<contents unit="LBS">10.0</contents>
		</tank>

		<!-- Engine 4 Fuel Supply Pipes-->
		<tank type="FUEL" number="10">
			<location unit="IN">
				<x>1462.0</x>
				<y>180.8</y>
				<z>-5.90</z>
			</location>
			<capacity unit="LBS">10.0</capacity>
			<contents unit="LBS">10.0</contents>
		</tank>
	</propulsion>

	<!--	<system file="pushback"/> -->

	<!-- **********************************************************************


        FLIGHT CONTROL
     **********************************************************************
-->
	<flight_control file="VC10_FCS.xml"/>


	<!-- **********************************************************************
        AERODYNAMICS
     **********************************************************************
-->
	<!--	<aerodynamics file="VC10_aeroOpenVSP.xml"/> -->
	<aerodynamics file="VC10_aeroDatcom.xml"/>
	<!--<aerodynamics file="VC10_aeromatic.xml"/> -->


	<!-- **********************************************************************
        FUEL
     **********************************************************************
-->
	<!--	<system file="VC10_fuel.xml"/> -->

	<external_reactions>
		<force name="pushback" frame="BODY">
			<location unit="IN">
				<x>-139</x>
				<y>0.0</y>
				<z>-71.0</z>
			</location>
			<direction>
				<x>1</x>
				<y>0</y>
				<z>0</z>
			</direction>
		</force>
	</external_reactions>

	<system name="V-speeds">
		<function name="Vm0-vs-alt">
			<table name="velocities/Vspeeds/Vm0-kts">
				<independentVar lookup="row">position/h-sl-ft</independentVar>
				<tableData>
					0	336.9
				20000	316.5
				31000	329.6	<!-- above altitude 31000ft Vm0 is limited by Mm0 (Mach 0.886 ) -->
				34839	300.4
				38700	275.3
				43000	250.2
				50000	250.0
				</tableData>
			</table>
		</function>

		<function name="V2-vs-Weight">
			<table name="velocities/Vspeeds/V2-kts">
				<independentVar lookup="row">inertia/weight-lbs</independentVar>
				<tableData>
					180779.1	132
					189597.6	134
					220462.3	141
					242508.5	146
					264554.8	150
					286601.0	155
					291010.2	156
					295419.5	158
					313997.8	163
				</tableData>
			</table>
		</function>

		<function name="VR-vs-Weight">
			<table name="velocities/Vspeeds/VR-kts">
				<independentVar lookup="row">inertia/weight-lbs</independentVar>
				<tableData>
					189597.6	122
					220462.3	129
					242508.5	134
					264554.8	140
					286601.0	146
					291010.2	148
					295419.5	149
					313997.8	155
				</tableData>
			</table>
		</function>

		<function name="VAT-vs-Weight">
			<table name="velocities/Vspeeds/VAT-kts">
				<independentVar lookup="row">inertia/weight-lbs</independentVar>
				<tableData>
					158732.9	113
					180779.1	120
					189597.6	123
					220462.3	133
					242508.5	141
					264554.8	149
					286601.0	157
					291010.2	158
					295419.5	160
					313997.8	167
				</tableData>
			</table>
		</function>
	</system>

	<system name="crash-detect">
		<channel name="impact-ground">
			<switch name="impact">
				<test logic="AND" value="1">
					velocities/mach gt 0.2
					position/h-agl-ft lt 6.0
					position/h-agl-ft gt 0.1					<!-- between EHAM and England there is h-agl-ft to 0 -->
					simulation/sim-time-sec gt 1.0
				</test>
				<test logic="AND" value="1">
					position/h-agl-ft lt 5.0
					position/h-agl-ft gt 0.1					<!-- between EHAM and England there is h-agl-ft to 0 -->
					simulation/sim-time-sec gt 1.0
				</test>
				<test logic="AND" value="1">
					position/h-agl-ft lt 5.95
					position/h-agl-ft gt 0.1					<!-- between EHAM and England there is h-agl-ft to 0 -->
					/VC10/over-water != 0
					simulation/sim-time-sec gt 1.0
				</test>
				<output>systems/crash-detect/crash-on-ground</output>
			</switch>
		</channel>
	</system>

	<system name="Fuel-CofG">

		<function name="Tank1a_CG">
			<table name="propulsion/tank[0]/New-x-position">
				<independentVar lookup="row">propulsion/tank[0]/contents-lbs</independentVar>
				<tableData>
					0.00		1054.11
					1168.65		1042.00
					2494.02		1035.15
					3223.40		1034.94
					4600.89		1040.95
					6625.27		1051.43
					8867.13		1065.99
					11153.41	1082.69
					13355.30	1101.34
					13398.06	1101.15
				</tableData>
			</table>
		</function>

		<function name="Tank1_CG">
			<table name="propulsion/tank[1]/New-x-position">
				<independentVar lookup="row">propulsion/tank[1]/contents-lbs</independentVar>
				<tableData>
					0.00		970.45
					4465.88		957.68
					8789.72		957.83
					13199.17	957.98
					17687.16	953.17
				</tableData>
			</table>
		</function>

		<function name="Tank2_CG">
			<table name="propulsion/tank[2]/New-x-position">
				<independentVar lookup="row">propulsion/tank[2]/contents-lbs</independentVar>
				<tableData>
					0.00		856.32
					4373.66		858.27
					8792.30		859.03
					13294.98	859.40
					17707.69	858.78
					22072.47	856.97
					26563.28	854.56
					30922.04	851.37
				</tableData>
			</table>
		</function>

		<function name="Tank3_CG">
			<table name="propulsion/tank[3]/New-x-position">
				<independentVar lookup="row">propulsion/tank[3]/contents-lbs</independentVar>
				<tableData>
					0.00		856.32
					4373.66		858.27
					8792.30		859.03
					13294.98	859.40
					17707.69	858.78
					22072.47	856.97
					26563.28	854.56
					30922.04	851.37
				</tableData>
			</table>
		</function>

		<function name="Tank4_CG">
			<table name="propulsion/tank[4]/New-x-position">
				<independentVar lookup="row">propulsion/tank[4]/contents-lbs</independentVar>
				<tableData>
					0.00		970.45
					4465.88		957.68
					8789.72		957.83
					13199.17	957.98
					17687.16	953.17
				</tableData>
			</table>
		</function>

		<function name="Tank4a_CG">
			<table name="propulsion/tank[5]/New-x-position">
				<independentVar lookup="row">propulsion/tank[5]/contents-lbs</independentVar>
				<tableData>
					0.00		1054.11
					1168.65		1042.00
					2494.02		1035.15
					3223.40		1034.94
					4600.89		1040.95
					6625.27		1051.43
					8867.13		1065.99
					11153.41	1082.69
					13355.30	1101.34
					13398.06	1101.15
				</tableData>
			</table>
		</function>

		<function name="TankC_CG">
			<table name="propulsion/tank[6]/New-x-position">
				<independentVar lookup="row">propulsion/tank[6]/contents-lbs</independentVar>
				<tableData>
					0.00		861.62
					4409.25		847.84
					6635.28		841.66
					8861.31		836.42
					11044.52	833.08
					13227.74	830.91
					17679.80	828.71
					22046.23	825.09
					26455.48	823.35
					30821.95	821.39
					35273.97	817.29
					39683.21	809.89
				</tableData>
			</table>
		</function>

	</system>

</fdm_config>
